##################################################################
# LAMMPS input file generated using pylion 0.5.3
# simulation name: test
#
# pylion is written and maintained by Dimitris Trypogeorgos
# and Elliot Bentine. Download it from
# https://bitbucket.org/dtrypogeorgos/pylion
#
# If you find it useful please cite <paper>.
##################################################################


units si
atom_style charge

# Creating simulation box...
boundary m m m
region simulationDomain block -0.001  0.001 -0.001 0.001 -0.001 0.001 units box
create_box 1 simulationDomain

# Configure neighbour list...
neighbor 1 nsq
neigh_modify once yes

# Configure pairwise interactions for long range Coulombics only...
pair_style coul/cut 10
pair_coeff * *

# Placing individual ions...


create_atoms 1 single -0.0007136116170714946 -0.0003818656134211108 -0.00021568887475731185 units box

create_atoms 1 single 0.0004923001046112337 0.0005763400403473987 0.00021171766581126253 units box

create_atoms 1 single 0.00015156363231120937 -0.00015431284816654292 -0.00011155760723631271 units box

create_atoms 1 single -0.000297364444604311 -0.000204894160027477 -0.0005673629518777905 units box

create_atoms 1 single -4.445900028629483e-05 -2.836273181039645e-05 0.00016480331464520463 units box

create_atoms 1 single -8.324659318824307e-05 -2.626886006939379e-06 -0.0006410452598005361 units box

create_atoms 1 single 0.0001504550669084526 0.0005359764829512666 0.0008072607577223901 units box

create_atoms 1 single 7.618327478404284e-05 8.084761502477298e-05 0.0004692474288098786 units box

create_atoms 1 single 3.756837045328078e-05 -6.387194929396537e-05 -8.695881222336631e-05 units box

create_atoms 1 single 8.769756862078427e-05 8.262723516682454e-05 -0.0006930427423620633 units box

create_atoms 1 single 4.084929836394899e-05 -6.760775187706071e-05 0.00015737447476036706 units box

create_atoms 1 single 0.0006067862822957474 -0.0004293619300434603 -3.7667316043401265e-05 units box

create_atoms 1 single 0.0006691302903750556 0.0001337405192212833 0.0001451906172062263 units box

create_atoms 1 single -0.00011100234309466197 0.00022984534679907904 -0.0007041733747959473 units box

create_atoms 1 single 4.732107269752111e-06 -6.908435586088491e-05 8.736975404277301e-05 units box

create_atoms 1 single 1.2924222757863755e-07 1.5298765835806414e-07 8.656220460498714e-05 units box

create_atoms 1 single -0.00023313099135402983 -0.00034697093246673696 -0.00015955952551191546 units box

create_atoms 1 single 0.00015692330185384186 0.00010387708548597719 0.0008782460641614523 units box

create_atoms 1 single 0.0006112974947658677 -0.0005441434035782243 -0.00047354220483033816 units box

create_atoms 1 single 0.00023555597612827153 3.493434295758986e-05 -0.00034436764784321824 units box

create_atoms 1 single 3.245913246837498e-05 5.39490471939136e-05 -0.00038881483991494366 units box

create_atoms 1 single -0.00011855244182460442 8.753513029903679e-05 0.0006513740561565257 units box

create_atoms 1 single 0.00011071231561710707 0.00040558060246860983 -0.0004476137838802861 units box

create_atoms 1 single -5.399173851155409e-05 7.987790464657961e-06 0.0001775509222782433 units box

create_atoms 1 single -0.0004498490428389714 -0.0001015264624541275 0.00047688033502979075 units box

create_atoms 1 single 9.562693617822854e-05 -0.00027830230602755217 -0.00022651656647271223 units box

create_atoms 1 single -0.0001335671582438354 0.0001453142431621033 -0.0007102350638736224 units box

create_atoms 1 single 0.00023094030994752179 3.8677072800821506e-05 0.00030166452351822057 units box

create_atoms 1 single 0.00039191932586432826 -0.00015853100009263456 0.00016422360201115137 units box

create_atoms 1 single -5.7940138100788364e-05 9.203316347443198e-05 -0.0008732303399412327 units box

create_atoms 1 single -7.725013627695413e-07 0.0003442598895593103 -0.00032617887625927553 units box

create_atoms 1 single -0.00020666830977195165 -0.000218379758895876 9.841638368141151e-05 units box

create_atoms 1 single 3.21342401817033e-05 -5.7506303604307684e-05 -0.0006562804864862469 units box

create_atoms 1 single -0.00017345453232948908 0.00038564733361050324 0.0003500199951978094 units box

create_atoms 1 single 0.00034577326001909936 -0.0001029392065841698 -0.0002249462671807027 units box

create_atoms 1 single 0.0005013672732524855 0.00023740290499826394 -0.0002477488592023726 units box

create_atoms 1 single -3.753734123722116e-06 -5.727803766035902e-05 0.0007621454275427184 units box

create_atoms 1 single 7.11833900039557e-05 0.00019166321358327182 0.00024545747063454336 units box

create_atoms 1 single 0.00014697665072952332 -0.0006673636366265758 -0.0004887792635425405 units box

create_atoms 1 single -0.00022754992837095104 -3.0227340387740035e-05 -0.00019364374497830795 units box

create_atoms 1 single -2.4572009099460454e-06 1.0265157935313758e-06 3.6982314086808616e-06 units box

create_atoms 1 single 0.00021552169559853693 -0.00039738551924434136 -3.377377034860286e-05 units box

create_atoms 1 single 0.0004473742357960862 -0.00018875226567077063 0.00019763275350655638 units box

create_atoms 1 single 0.0001395799027974042 6.592233955488475e-05 -0.0006059447961346022 units box

create_atoms 1 single 5.482807147459971e-09 -4.109111168123363e-08 -6.970741958548223e-07 units box

create_atoms 1 single -0.00019316452332748528 -0.0003162935853254577 -0.0003058770273188376 units box

create_atoms 1 single -4.79378065564762e-05 4.500984299205896e-05 -0.0008017840025828959 units box

create_atoms 1 single 0.0002575558274307026 0.00010924652952382841 -0.00016237886282587696 units box

create_atoms 1 single -0.00024972482845027783 2.746109532866909e-05 -0.00022863787338802148 units box

create_atoms 1 single 0.000244159126266352 -0.00011072937003693212 8.808459792762631e-05 units box


# Species...
mass 1 1.4944851e-26
set type 1 charge 1.6021764599999998e-19
group 1 type 1


timestep 1e-06

# Configuring additional output to flush buffer during simulation...
thermo 10000
thermo_style custom step cpu
thermo_modify flush yes

# Time integration...

group nonRigidBody union all

fix timeIntegrator nonRigidBody nve


dump 9034056886 all custom 10 /Users/michaelmitchell/qlicS/data/2024-07-07_16-13-53/positions.txt id x y z vx vy vz


# Pseudopotential approximation for Linear Paul trap... (fixID=9035798770)


# SHO

variable k_x9035798770		equal 1.773509e-12

variable k_y9035798770		equal 1.773509e-12

variable k_z9035798770		equal 1.548694e-13

variable fX9035798770 atom "-v_k_x9035798770 * x"

variable fY9035798770 atom "-v_k_y9035798770 * y"

variable fZ9035798770 atom "-v_k_z9035798770 * z"

variable E9035798770 atom "v_k_x9035798770 * x * x /         2 + v_k_y9035798770 * y * y / 2 + v_k_z9035798770 * z * z / 2"

fix 9035798770 all addforce         v_fX9035798770 v_fY9035798770 v_fZ9035798770 energy v_E9035798770


timestep 1e-08


# Run simulation

run 10000
