##################################################################
# LAMMPS input file generated using pylion 0.5.3
# simulation name: test
#
# pylion is written and maintained by Dimitris Trypogeorgos
# and Elliot Bentine. Download it from
# https://bitbucket.org/dtrypogeorgos/pylion
#
# If you find it useful please cite <paper>.
##################################################################


units si
atom_style charge

# Creating simulation box...
boundary m m m
region simulationDomain block -0.001  0.001 -0.001 0.001 -0.001 0.001 units box
create_box 2 simulationDomain

# Configure neighbour list...
neighbor 1 nsq
neigh_modify once yes

# Configure pairwise interactions for long range Coulombics only...
pair_style coul/cut 10
pair_coeff * *

# Placing individual ions...


create_atoms 1 single -0.0001293982699408747 4.159828494871382e-05 0.0008008397295216112 units box

create_atoms 1 single 0.00030298694021544916 8.750749383014908e-07 -3.9243938249170235e-05 units box

create_atoms 1 single 0.00011056025895673339 2.8385959548670366e-05 6.125456434439692e-05 units box

create_atoms 1 single 0.00027752952309898735 0.00030558391470239397 0.0003033510022806361 units box

create_atoms 1 single -0.0003663149624208822 0.00016964661352464165 0.00015423153383235696 units box

create_atoms 1 single -0.0002472072400474024 -7.722560381011827e-05 0.00029507526174125996 units box

create_atoms 1 single 1.4284654128894247e-06 2.0014302728811445e-05 -6.532295229882523e-05 units box

create_atoms 1 single 0.00021214045444748036 0.0001445891668936912 0.0004979743196902736 units box

create_atoms 1 single -0.0003525897738811652 -0.00034546471932715304 -0.00021130889545543916 units box

create_atoms 1 single -6.492561831615439e-05 0.00017386410524118415 0.00030007401216429057 units box

create_atoms 1 single 0.00031056406123085854 -6.134784671634398e-05 -0.0006141530725206285 units box

create_atoms 1 single 0.0001298607457413011 -9.237204897426665e-06 7.006420097324086e-06 units box

create_atoms 1 single -0.0003086897698269631 -9.614537596578727e-05 -0.00012468931920837638 units box

create_atoms 1 single -1.1381129950495241e-05 -3.9928065242987616e-05 1.0242202648405045e-05 units box

create_atoms 1 single -2.291811449592088e-05 6.288580977952603e-05 0.000315820849706403 units box

create_atoms 1 single -3.6824028968750615e-05 0.00030442997953785794 -0.0002291233338267718 units box

create_atoms 1 single 0.0005094205782693012 -0.0001867272362847932 0.0004622379380640238 units box

create_atoms 1 single 3.905245593401429e-05 2.0817991952597737e-05 -8.142935480726034e-05 units box

create_atoms 1 single 0.00027274499271477405 -0.00022238133872585667 -0.0005262859602324424 units box

create_atoms 1 single 6.339533901815346e-07 2.004217340741984e-06 -0.0003768147933233441 units box


# Species...
mass 1 1.4944851e-26
set type 1 charge 1.6021764599999998e-19
group 1 type 1


create_atoms 2 single -1.4448950477807597e-06 8.322071377412918e-06 0.000836251510317593 units box

create_atoms 2 single 0.00027991450172541775 -0.00043047515171734115 -0.0005541524775105503 units box

create_atoms 2 single -8.519887821407689e-05 -0.00011954907821695222 0.0007405462966016275 units box

create_atoms 2 single 5.455743760630867e-05 -0.0009047978175618547 -0.00024251486775805014 units box

create_atoms 2 single 1.649609397995346e-07 -9.695673389946688e-06 -1.5655085525304234e-05 units box

create_atoms 2 single 6.36909818313082e-05 4.3996946628675224e-05 -1.8803440378103673e-05 units box

create_atoms 2 single 0.00010306951396566366 -8.565145310727446e-05 -6.254588135372238e-05 units box

create_atoms 2 single 0.00020315018838812067 0.000495430989440188 -2.6306895863228925e-05 units box

create_atoms 2 single -2.518118107969163e-05 -9.705151027534402e-05 0.00011045400269334492 units box

create_atoms 2 single -7.727768702102615e-06 0.00048318379136978354 -0.0004161630793127245 units box


# Species...
mass 2 5.3137248e-26
set type 2 charge 1.6021764599999998e-19
group 2 type 2


timestep 1e-06

# Configuring additional output to flush buffer during simulation...
thermo 10000
thermo_style custom step cpu
thermo_modify flush yes

# Time integration...

group nonRigidBody union all

fix timeIntegrator nonRigidBody nve


dump 8942989461 all custom 10 /Users/michaelmitchell/qlicS/data/2024-07-08_09-57-50/positions.txt id x y z vx vy vz


# Pseudopotential approximation for Linear Paul trap... (fixID=8944600853)


# SHO

variable k_x8944600853		equal 1.773509e-12

variable k_y8944600853		equal 1.773509e-12

variable k_z8944600853		equal 1.548694e-13

variable fX8944600853 atom "-v_k_x8944600853 * x"

variable fY8944600853 atom "-v_k_y8944600853 * y"

variable fZ8944600853 atom "-v_k_z8944600853 * z"

variable E8944600853 atom "v_k_x8944600853 * x * x /         2 + v_k_y8944600853 * y * y / 2 + v_k_z8944600853 * z * z / 2"

fix 8944600853 all addforce         v_fX8944600853 v_fY8944600853 v_fZ8944600853 energy v_E8944600853


variable coolx atom (9.269386030594033e-20+(2.703426035144626e-21*vx))*-0.5000000000000001
variable cooly atom (9.269386030594033e-20+2.703426035144626e-21*vy)*-0.5000000000000001
variable coolz atom (9.269386030594033e-20+2.703426035144626e-21*vz)*-0.7071067811865476
fix 569202603907002 1 addforce v_coolx v_cooly v_coolz


timestep 1e-08


# Run simulation

run 20000
